C := [1, 2, 3, 4; 5, 1, 2, 3; 3, 5, 5, 6; 9, 5, 4, 2; 5, 9, 3, 5]
A := [4, 5, 1, 3; 4, 5, 1, 5; 7, 8, 9, 2; 3, 4, 0, 2]
ORIGIN := 1
ORIGIN := 1
minrows(C) :=
    sum ← 0
    m ← 100
    for i ∈ 1 .. rows(C)
        sum ← sum + m
        m ← 100
        for j ∈ 1 .. cols(C)
            m ← C[i, j] if (C[i, j] < m)
    return sum - 100
minsum(A) :=
    for i ∈ 1 .. rows(A)
        M ← 0
        for j ∈ 1 .. cols(A)
            M ← M + A[i, j]
    minM ← min(M)
minsum(A) = 9
minrows(C) = 7
