Задание1
x := -1.6, -1.5 .. 0.8
x0 := 0
f(x) := x^3 + 0.77*x^2 - 0.251*x - 0.017
# [plot: f(x), x0 vs x]
x1 := -1.5
root(f(x1), x1) = -1.00329
x2 := 0
root(f(x2), x2) = -0.0581418
x3 := 0.3
root(f(x3), x3) = 0.29143
Задание2
x := -1.6, -1.5 .. 0.8
f(x) := x^3 + 0.77*x^2 - 0.251*x - 0.017
v := [-0.017; -0.251; 0.77; 1]
r := polyroots(v)  # error: Эта расширенная возможность. Для использования этой и других расширенных возможностей обновите лицензию до полной с помощью кнопки "Обновить".
