D := [4, 5, 6, 1, 2; 4, 7, 9, 120, 4; 4, 3, 2, 1, 10; 32, 3, 4, 5, 3]
A := [1, 2, 3, 4; 7, 6, 65, 1; 2, 1, 3, 4; 2, 3, 4, 9]
C := [5, 1, 2; 4, 9, 4; 2, 4, 1]
B := [3, 4, 1, 5; 6, 7, 8, 100; 12, 1, 1, 9; 51, 5, 6, 1]
# A | B
# Максимальная сумма элементов по строкам
ORIGIN := 1
ORIGIN := 1
# Количество заданного элемента в матрице
count(B, p) :=
    k ← 0
    for i ∈ 1 .. rows(B)
        for j ∈ 1 .. cols(B)
            k ← k + 1 if (B[i, j] == p)
    return k
maxsum(A) :=
    for i ∈ 1 .. rows(A)
        S[i] ← 0
        for j ∈ 1 .. cols(A)
            S[i] ← S[i] + A[i, j]
    Smax ← max(S)
count(C, 5) = 1
count(A, 1) = 3
maxsum(B) = 121
count(C, 9) = 1
maxsum(D) = 144
count(A, 65) = 1
count(C, 10) = 0
count(A, 3) = 3
