# Задание 4
w := 1
x := 1
y := 1
z := 1
A := [3, 3, 4, 7; 2, 6, 4, 6; 3, 4, 5, 6; 1, 9, 3, 5]
B := [3; 4; 8; 2]
Given
3*x + 3*y + 4*z + 7*w == 3
2*x + 6*y + 4*z + 6*w == 4
Minerr(x, y, z, w) = [1; 0.416667; 1; -0.75]
3*x + 4*y + 5*z + 6*w == 8
# Задание 1
x + 9*y + 3*z + 5*w == 2
soln1 := A^-1*B
# Задание 5
soln1 = [1.25; 0.125; 3; -1.875]
x := 1
y := 1
Given
7*x^2 + 6*y^2 == 3
Find(x, y) = [0.285714; 0.636209]
# Задание 2
5*x + 3*y == 2
x := 0
y := 0
z := 0
w := 0
# Задание 6
x := 1
y := 1
Given
3*x + 3*y + 4*z + 7*w == 3
Given
2*x + 6*y + 4*z + 6*w == 4
Find(x, y, z, w) =  # error: Эта переменная не определена.
3*x + 4*y + 5*z + 6*w == 8
7*x^2 + 6*y^2 == 3
x + 9*y + 3*z + 5*w == 2
5*x + 3*y == 2
# Задание 3
lsolve(A, B) = [1.25; 0.125; 3; -1.875]
