f(x) := 1/(1 + sin(x))
g(x) := e^(tan(x)^2)
y(x) := x/(1 + x)^3
integral(f(x), x) → -2/(tan(x/2) + 1)
integral(y(x), x = 0 .. ∞) → 1/2
integral(y(x), x = 0 .. ∞) simplify → 1/2
integral(f(x), x) simplify → -2/(tan(x/2) + 1)
d/dx(g(x)) → 2*e^(tan(x)^2)*tan(x)*(tan(x)^2 + 1)
d/dx(g(x)) simplify → 2*e^(tan(x)^2)*tan(x)*(tan(x)^2 + 1)
d^2/dx^2(g(x)) → 2*e^(tan(x)^2)*(tan(x)^2 + 1)^2 + 4*e^(tan(x)^2)*tan(x)^2*(tan(x)^2 + 1) + 4*e^(tan(x)^2)*tan(x)^2*(tan(x)^2 + 1)^2
d^2/dx^2(g(x)) simplify → 2*e^(tan(x)^2)*(2*tan(x)^6 + 7*tan(x)^4 + 6*tan(x)^2 + 1)
d^3/dx^3(g(x)) → 16*e^(tan(x)^2)*tan(x)*(tan(x)^2 + 1)^2 + 12*e^(tan(x)^2)*tan(x)*(tan(x)^2 + 1)^3 + 8*e^(tan(x)^2)*tan(x)^3*(tan(x)^2 + 1) + 24*e^(tan(x)^2)*tan(x)^3*(tan(x)^2 + 1)^2 + 8*e^(tan(x)^2)*tan(x)^3*(tan(x)^2 + 1)^3
d^3/dx^3(g(x)) simplify → 4*e^(tan(x)^2)*tan(x)*(2*tan(x)^8 + 15*tan(x)^6 + 33*tan(x)^4 + 27*tan(x)^2 + 7)
d^4/dx^4(g(x)) → 16*e^(tan(x)^2)*(tan(x)^2 + 1)^3 + 12*e^(tan(x)^2)*(tan(x)^2 + 1)^4 + 16*e^(tan(x)^2)*tan(x)^4*(tan(x)^2 + 1) + 88*e^(tan(x)^2)*tan(x)^2*(tan(x)^2 + 1)^2 + 176*e^(tan(x)^2)*tan(x)^2*(tan(x)^2 + 1)^3 + 48*e^(tan(x)^2)*tan(x)^2*(tan(x)^2 + 1)^4 + 112*e^(tan(x)^2)*tan(x)^4*(tan(x)^2 + 1)^2 + 96*e^(tan(x)^2)*tan(x)^4*(tan(x)^2 + 1)^3 + 16*e^(tan(x)^2)*tan(x)^4*(tan(x)^2 + 1)^4
d^4/dx^4(g(x)) simplify → 4*e^(tan(x)^2)*(4*tan(x)^12 + 52*tan(x)^10 + 219*tan(x)^8 + 390*tan(x)^6 + 314*tan(x)^4 + 102*tan(x)^2 + 7)
