# Задание  1 | Задание 2
f(x, y, z) := z*x*ln(y) + x*y^2*z
y(x) := x^5 + 5*x - 6
x0 := 0
y0 := -1
d/dx(y(x)) → 5*x^4 + 5
yy(x) := d/dx(y(x))
d^2/dx^2(z*x*ln(y) + x*y^2*z)
0
tang(x) := yy(x0)*(x - x0) + y0
tang(x) → 5*x - 1
2*x*z - x*z/y^2
d^2/dy^2(z*x*ln(y) + x*y^2*z)
norm(x) := -1/yy(x0)*(x - x0) + y0
norm(x) → -x/5 - 1
0
d^2/dz^2(z*x*ln(y) + x*y^2*z)
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x1 := 0
y1 := 2
z1 := 1
px2 := 2*x1*z1 - (x1*z1)/y1^2
px2 = 0
py2 := 0
py2 = 0
pz2 := 0
pz2 = 0
2*e^x + x^2*e^x + 4*x*e^x
