# Задание 1
x := 1
y := 0
Given
x == 4 - y^2
Find(x, y) = [4; 0]  # (4, 0)
x + 2*y - 4 == 0
x := 0
y := 1
Given
x == 4 - y^2
Find(x, y) = [0; 2]  # (0, 2)
x + 2*y - 4 == 0
integral(integral(1, x = 4 - 2*y .. 4 - y^2), y = 0 .. 2) simplify → 4/3
# Задание 2
x := 1
y := 0
Given
x^2 + y^2 == 4  # (2, 0)
Find(x, y) = [2; 0]
x + y == 2
x := 0
y := 1
Given
x^2 + y^2 == 4
Find(x, y) = [0; 2]  # (0, 2)
x + y == 2
2*integral(integral(1, x = 2 - y .. sqrt(4 - y^2)), y = 0 .. 2) simplify → 2*π - 4
2*integral(integral(x, x = 2 - y .. sqrt(4 - y^2)), y = 0 .. 2) simplify → 8/3
2*integral(integral(y, x = 2 - y .. sqrt(4 - y^2)), y = 0 .. 2) simplify → 8/3
# Координаты центра тяжести
x1 := 1/(2*π - 4)*8/3
x1 = 1.16796
y1 := 1/(2*π - 4)*8/3
y1 = 1.16796
