# Задание 1
Given
y(0) == 0
d/dx(y(x)) == e - 2*y(x)*cos(x) - y(x)
y := Odesolve(x, 1)
x := 0, 0.05 .. 1
y(0) = 0
y(1) = 1.01849
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# Задание 2
y0 == 0
D(x, y) == e - 2*y(x)*cos(x) - y(x)
K := 1
x1 == 0
x2 == 1
y(x) == rkfixed(y0, x1, x2, K, D)
x := 0, 0.05 .. 1
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