x := transpose([1, 2, 3, 4, 5, 6, 7])
x := transpose([1, 2, 3, 4, 5, 6, 7])
y := transpose([52.7, 56.5, 60.7, 54.8, 70.4, 68.1, 67.8])
y := transpose([52.7, 56.5, 60.7, 54.8, 70.4, 68.1, 67.8])
A(t) := linterp(x, y, t)
s := cspline(x, y)
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C(t) := interp(s, x, y, t)
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A(2.4) = 58.18
A(5) = 70.4
A(0) = 48.9
A(10) = 66.9
